<?xml version="1.0"?>

<!--
  File:     RR Merlin.xml
  Author:   Aero-Matic v 0.82

  Inputs:
    name:           RR Merlin
    type:           piston
    power:          1290 hp
    augmented?      no
    injected?       no
-->

<piston_engine name="RR Merlin">
	<minmp unit="INHG">          10.0 </minmp>
	<maxmp unit="INHG">         48.5 </maxmp>
	<displacement unit="IN3"> 1647.00 </displacement>
	<maxhp>        1200.00 </maxhp>
	<cycles>         4.0 </cycles>
	<idlerpm>      800.0 </idlerpm>
	<maxrpm>      3000.0 </maxrpm>
	<sparkfaildrop>  0.1 </sparkfaildrop>
	<volumetric-efficiency> 2.8 </volumetric-efficiency>
	<!-- Optional items that affect engine performance -->
	<!-- Defining <bsfc> over-rides the built-in horsepower calculations -->
	<bsfc>           0.25 </bsfc>
	<stroke unit="IN">  6.0  </stroke>-->
	<bore unit="IN">    5.4 </bore>
	<cylinders>         12.0  </cylinders>
	<compression-ratio> 12.0 </compression-ratio>
	<numboostspeed>2</numboostspeed>
	<boostmanual>1</boostmanual>
	<boostoverride>1</boostoverride>
	<ratedboost1 unit="INHG"> 36.0 </ratedboost1>
	<ratedpower1 unit="HP"> 2690 </ratedpower1>
	<ratedrpm1> 2700 </ratedrpm1>
	<ratedaltitude1 unit="FT"> 26000 </ratedaltitude1>
	<ratedboost2 unit="INHG"> 48.0 </ratedboost2>
	<ratedpower2 unit="HP"> 3090 </ratedpower2>
	<ratedrpm2> 2700 </ratedrpm2>
	<ratedaltitude2 unit="FT"> 35500 </ratedaltitude2>
</piston_engine>
