<?xml version="1.0"?>
<!-- Generated by Aero-Matic v 1.1

     Inputs:
                horsepower: 1290
                     pitch: variable
            max engine rpm: 3000
        prop diameter (ft): 13

     Outputs:
              max prop rpm: 1443.31
                gear ratio:    2.08
                       Cp0: 0.057730
                       Ct0: 0.134511
       static thrust (lbs): 5286.37
-->

<propeller name="Prop">
  <ixx> 108.13 </ixx>
  <diameter unit="IN"> 136.0 </diameter>
  <numblades> 3 </numblades>
  <gearratio>  1.78 </gearratio>
  <p_factor>  10.00 </p_factor>
  <minpitch> 18 </minpitch>
  <maxpitch> 90 </maxpitch>
  <minrpm>   500 </minrpm>
  <maxrpm>   2000 </maxrpm>

<!-- thrust coefficient as a function of advance ratio and blade angle -->
<!--  <table name="C_THRUST" type="internal">
      <tableData>
                -10        0         15        25        35        45        55        65       90
      -0.2      -0.0656    0.0370    0.1345    0.1648    0.1816    0.1917    0.1766    0.1513   0.0000
       0.0      -0.0975    0.0000    0.1345    0.1648    0.1816    0.1934    0.1808    0.1513   0.0000
       0.2      -0.1094   -0.0336    0.1161    0.1614    0.1790    0.1934    0.1808    0.1513   0.0000
       0.4      -0.1094   -0.0782    0.0874    0.1598    0.1757    0.1917    0.1808    0.1513   0.0000
       0.6      -0.1094   -0.1094    0.0463    0.1438    0.1681    0.1867    0.1782    0.1513   0.0000
       0.8      -0.1094   -0.1094    0.0026    0.1076    0.1632    0.1800    0.1782    0.1513   0.0000
       1.0      -0.1094   -0.1094   -0.0437    0.0656    0.1564    0.1707    0.1766    0.1513   0.0000
       1.2      -0.1094   -0.1094   -0.0900    0.0202    0.1286    0.1648    0.1766    0.1513   0.0000
       1.4      -0.1094   -0.1094   -0.1094   -0.0295    0.0925    0.1622    0.1732    0.1513   0.0000
       1.6      -0.1094   -0.1094   -0.1094   -0.0748    0.0504    0.1564    0.1699    0.1513   0.0000
       1.8      -0.1094   -0.1094   -0.1094   -0.1094    0.0085    0.1345    0.1648    0.1513   0.0000
       2.0      -0.1094   -0.1094   -0.1094   -0.1094   -0.0336    0.1051    0.1641    0.1513   0.0000
       2.2      -0.1094   -0.1094   -0.1094   -0.1094   -0.0757    0.0757    0.1614    0.1513   0.0000
       2.4      -0.1094   -0.1094   -0.1094   -0.1094   -0.1094    0.0404    0.1318    0.1513   0.0000
       2.6      -0.1094   -0.1094   -0.1094   -0.1094   -0.1094    0.0051    0.0834    0.1345   0.0000
       2.8      -0.1094   -0.1094   -0.1094   -0.1094   -0.1094   -0.0303    0.0546    0.1094   0.0000
       3.0      -0.1094   -0.1094   -0.1094   -0.1094   -0.1094   -0.0656    0.0287    0.0841   0.0000
       3.2      -0.1094   -0.1094   -0.1094   -0.1094   -0.1094   -0.1009    0.0026    0.0589   0.0000
       3.4      -0.1094   -0.1094   -0.1094   -0.1094   -0.1094   -0.1094   -0.0235    0.0336   0.0000
       3.6      -0.1094   -0.1094   -0.1094   -0.1094   -0.1094   -0.1094   -0.0496    0.0085   0.0000
       3.8      -0.1094   -0.1094   -0.1094   -0.1094   -0.1094   -0.1094   -0.0757   -0.0168   0.0000
       4.0      -0.1094   -0.1094   -0.1094   -0.1094   -0.1094   -0.1094   -0.1017   -0.0421   0.0000
       6.0      -0.1094   -0.1094   -0.1094   -0.1094   -0.1094   -0.1094   -0.1094   -0.1094   0.0000
      </tableData>
  </table> -->

 <!-- power coefficient as a function of advance ratio and blade angle -->
<!--   <table name="C_POWER" type="internal">
     <tableData>
               -10        0        15        25        35        45        55        65       90
      -0.2      0.0096   0.0192    0.0674    0.1530    0.2638    0.3752    0.4330    0.4792   0.4792
       0.0      0.0385   0.0096    0.0577    0.1426    0.2523    0.3752    0.4347    0.4792   0.4792
       0.2      0.0548   0.0154    0.0558    0.1328    0.2413    0.3752    0.4347    0.4792   0.4792
       0.4      0.0739   0.0337    0.0481    0.1224    0.2292    0.3752    0.4347    0.4792   0.4792
       0.6      0.0906   0.0510    0.0318    0.1137    0.2148    0.3677    0.4330    0.4792   0.4792
       0.8      0.1068   0.0683    0.0096    0.0964    0.2021    0.3510    0.4330    0.4792   0.4792
       1.0      0.1230   0.0849    0.0096    0.0675    0.1905    0.3331    0.4312    0.4792   0.4792
       1.2      0.1397   0.0678   -0.0318    0.0260    0.1686    0.3192    0.4284    0.4792   0.4792
       1.4      0.1559   0.1172   -0.0479   -0.0192    0.1299    0.3146    0.4232    0.4792   0.4792
       1.6      0.1720   0.1339   -0.0560   -0.0577    0.0820    0.3060    0.4139    0.4618   0.4792
       1.8      0.1888   0.1501   -0.0577   -0.0964    0.0241    0.2713    0.4012    0.4520   0.4792
       2.0      0.2049   0.1663   -0.0739   -0.1345   -0.0289    0.2309    0.3822    0.4428   0.4792
       2.2      0.2211   0.1830   -0.0906   -0.1732   -0.0866    0.1876    0.3706    0.4232   0.4792
       2.4      0.2378   0.1992   -0.1068   -0.2119   -0.1443    0.1339    0.3597    0.4139   0.4792
       2.6      0.2540   0.2153   -0.1230   -0.2500   -0.1830    0.0560    0.3510    0.3995   0.4792
       2.8      0.2702   0.2321   -0.1397   -0.2886   -0.2194   -0.0191    0.3435    0.3943   0.4792
       3.0      0.2869   0.2482   -0.1559   -0.3273   -0.2598   -0.0866    0.3319    0.3943   0.4792
       3.2      0.3031   0.2644   -0.1720   -0.3654   -0.2985   -0.1541    0.3106    0.3851   0.4792
       3.4      0.3192   0.2811   -0.1888   -0.4041   -0.3366   -0.2211    0.2407    0.3752   0.4792
       3.6      0.3360   0.2973   -0.2049   -0.4428   -0.3752   -0.2886    0.1691    0.3654   0.4792
       3.8      0.3522   0.3135   -0.2211   -0.4792   -0.4139   -0.3562    0.0941    0.3539   0.4792
       4.0      0.3683   0.3302   -0.2378   -0.4792   -0.4792   -0.4232    0.0191    0.3273   0.4792
       6.0      0.4792   0.4792   -0.4792   -0.4792   -0.4792   -0.4792   -0.4792   -0.2886   0.4792
     </tableData>
  </table>  -->

 <!-- thrust coefficient as a function of advance ratio and blade angle -->
  <table name="C_THRUST" type="internal">
      <tableData>
                  0.0000    15.0000    25.0000    35.0000    45.0000    90.0000
       0          0.0000     0.1410     0.1600     0.1740     0.1800     0.0000
       0.2000    -0.1553     0.1160     0.1550     0.1700     0.1820     0.0000
       0.4000    -0.3608     0.0840     0.1520     0.1640     0.1860     0.0000
       0.6000    -0.5049     0.0450     0.1475     0.1600     0.1880     0.0000
       0.8000    -0.5049     0.0040     0.1000     0.1550     0.1780     0.0000
       1.0000    -0.5049    -0.0520     0.0600     0.1455     0.1675     0.0000
       1.2000    -0.5049    -0.1070     0.0175     0.1175     0.1600     0.0000
       1.4000    -0.5049    -0.1300    -0.0350     0.0810     0.1580     0.0000
       1.6000    -0.5049    -0.1300    -0.0889     0.0450     0.1525     0.0000
       1.8000    -0.5049    -0.1300    -0.1300     0.0050     0.1280     0.0000
       2.0000    -0.5049    -0.1300    -0.1300    -0.0400     0.1000     0.0000
       2.2000    -0.5049    -0.1300    -0.1300    -0.0900     0.0700     0.0000
       2.4000    -0.5049    -0.1300    -0.1300    -0.1300     0.0400     0.0000
       2.6000    -0.5049    -0.1300    -0.1300    -0.1300     0.0070     0.0000
       2.8000    -0.5049    -0.1300    -0.1300    -0.1300    -0.0360     0.0000
       3.0000    -0.5049    -0.1300    -0.1300    -0.1300    -0.0780     0.0000
       3.2000    -0.5049    -0.1300    -0.1300    -0.1300    -0.1199     0.0000
       3.4000    -0.5049    -0.1300    -0.1300    -0.1300    -0.1300     0.0000
       3.6000    -0.5049    -0.1300    -0.1300    -0.1300    -0.1300     0.0000
       3.8000    -0.5049    -0.1300    -0.1300    -0.1300    -0.1300     0.0000
       4.0000    -0.5049    -0.1300    -0.1300    -0.1300    -0.1300     0.0000
       6.0000    -0.5049    -0.1300    -0.1300    -0.1300    -0.1300     0.0000
      </tableData>
  </table>

 <!-- power coefficient as a function of advance ratio and blade angle -->
  <table name="C_POWER" type="internal">
     <tableData>
                  0.0000    15.0000    25.0000    35.0000    45.0000    90.0000
       0          0.0445     0.0600     0.1490     0.2630     0.3900     2.2123
       0.2000     0.0712     0.0575     0.1380     0.2510     0.3900     2.2123
       0.4000     0.1554     0.0500     0.1270     0.2380     0.3900     2.2123
       0.6000     0.2354     0.0340     0.1180     0.2225     0.3820     2.2123
       0.8000     0.3153     0.0040     0.1000     0.2100     0.3650     2.2123
       1.0000     0.3918    -0.0170     0.0700     0.1990     0.3470     2.2123
       1.2000     0.3132    -0.0670     0.0260     0.1750     0.3325     2.2123
       1.4000     0.5411    -0.1170    -0.0229     0.1350     0.3260     2.2123
       1.6000     0.6184    -0.1670    -0.0686     0.0850     0.3180     2.2123
       1.8000     0.6930    -0.2170    -0.1146     0.0250     0.2810     2.2123
       2.0000     0.7676    -0.2700    -0.1599    -0.0343     0.2400     2.2123
       2.2000     0.8449    -0.3100    -0.2059    -0.1029     0.1920     2.2123
       2.4000     0.9196    -0.3500    -0.2519    -0.1716     0.1380     2.2123
       2.6000     0.9942    -0.4000    -0.2971    -0.2175     0.0550     2.2123
       2.8000     1.0715    -0.4500    -0.3431    -0.2608    -0.0226     2.2123
       3.0000     1.1461    -0.5000    -0.3891    -0.3088    -0.1029     2.2123
       3.2000     1.2207    -0.5500    -0.4344    -0.3548    -0.1832     2.2123
       3.4000     1.2980    -0.5696    -0.4804    -0.4001    -0.2628     2.2123
       3.6000     1.3727    -0.5696    -0.5264    -0.4461    -0.3431     2.2123
       3.8000     1.4473    -0.5696    -0.5696    -0.4920    -0.4234     2.2123
       4.0000     1.5246    -0.5696    -0.5696    -0.5696    -0.5030     2.2123
       6.0000     2.2123    -0.5696    -0.5696    -0.5696    -0.5696     2.2123
     </tableData>
  </table>

<!-- thrust effects of helical tip Mach -->
<table name="CT_MACH" type="internal">
  <tableData>
    0.85   1.0
    1.05   0.8
  </tableData>
</table>

<!-- power-required effects of helical tip Mach -->
<table name="CP_MACH" type="internal">
  <tableData>
    0.85   1.0
    1.05   1.8
    2.00   1.4
  </tableData>
</table>

</propeller>
